// COMSOL Multiphysics 5.6.0.280 model "colume snow.mph"
// Outline of the model tree

Geometry
  geom1 "几何 1" (2D axisymmetric, length unit m)
    r1: Rectangle "矩形 1" | size = {0.03, 0.03}
    r2: Rectangle "矩形 2" | size = {0.033, 0.033}
    pard1: PartitionDomains "分割域 1" | domain = r2(1) domains 1; partitionwith = edges; edge = r1(1) boundaries 2, 3
    ls2: LineSegment "线段 2" | vertex1 = pard1(1) points 5; specify2 = coord; coord2 = {0.033, 0.03}
    pard2: PartitionDomains "分割域 2" | domain = pard1(1) domains 2; partitionwith = edges; edge = ls2(1) boundaries 1
    ls3: LineSegment "线段 3" | vertex1 = pard2(1) points 1; specify2 = coord; coord2 = {0.005, 0}
    fin: Finalize "形成联合体"

Materials
  mat1: Common "Glass (quartz)" on domains 2, 3
    def "Basic"
      relpermeability = 1
      electricconductivity = 1e-14[S/m]
      relpermittivity = 4.2
      density = 2210[kg/m^3]
      thermalconductivity = 1.4[W/(m*K)]
      heatcapacity = 730[J/(kg*K)]
    RefractiveIndex
      n = 1.5
      ki = 0
  mat2: Common "Air" on domains 1
    def "Basic"
      thermalexpansioncoefficient = alpha_p(pA,T)
      molarmass = 0.02897[kg/mol]
      bulkviscosity = muB(T)
      relpermeability = 1
      relpermittivity = 1
      dynamicviscosity = eta(T)
      ratioofspecificheat = 1.4
      electricconductivity = 0[S/m]
      heatcapacity = Cp(T)
      density = rho(pA,T)
      thermalconductivity = k(T)
      soundspeed = cs(T)
      eta: Piecewise | arg = T; pieces = {200.0, 1600.0, -8.38278E-7+8.35717342E-8*T^1-7.69429583E-11*T^2+4.6437266E-14*T^3-1.06585607E-17*T^4}; argunit = K; fununit = Pa*s
      Cp: Piecewise | arg = T; pieces = {200.0, 1600.0, 1047.63657-0.372589265*T^1+9.45304214E-4*T^2-6.02409443E-7*T^3+1.2858961E-10*T^4}; argunit = K; fununit = J/(kg*K)
      rho: Analytic | expr = pA*0.02897/R_const[K*mol/J]/T; args = {pA, T}; argunit = Pa,K; fununit = kg/m^3
      k: Piecewise | arg = T; pieces = {200.0, 1600.0, -0.00227583562+1.15480022E-4*T^1-7.90252856E-8*T^2+4.11702505E-11*T^3-7.43864331E-15*T^4}; argunit = K; fununit = W/(m*K)
      cs: Analytic | expr = sqrt(1.4*R_const[K*mol/J]/0.02897*T); args = T; argunit = K; fununit = m/s
      an1: Analytic | funcname = alpha_p; expr = -1/rho(pA,T)*d(rho(pA,T),T); args = {pA, T}; argunit = Pa,K; fununit = 1/K
      an2: Analytic "Analytic 2a" | funcname = muB; expr = 0.6*eta(T); args = T; argunit = K; fununit = Pa*s
    RefractiveIndex
      n = 1
      ki = 0
    NonlinearModel
      BA = (def.gamma+1)/2
    idealGas
      Rs = R_const/Mn
      heatcapacity = Cp(T)
      ratioofspecificheat = 1.4
      molarmass = 0.02897
      Cp: Piecewise | arg = T; pieces = {200.0, 1600.0, 1047.63657-0.372589265*T^1+9.45304214E-4*T^2-6.02409443E-7*T^3+1.2858961E-10*T^4}; argunit = K; fununit = J/(kg*K)

Physics
  ht: HeatTransfer "固体传热" on all domains
    dependent variable T
    solid1: SolidHeatTransferModel "固体 1" (default)
    init1: init "初始值 1" (default)
    axi1: AxialSymmetry "轴对称 1" (default)
    ins1: ThermalInsulation "热绝缘 1" (default)
    temp1: TemperatureBoundary "温度 1" on boundaries 2 | T0 = 200.15[K]
    hf1: HeatFluxBoundary "热通量 1" (disabled) on boundaries 5
      HeatFluxType = ConvectiveHeatFlux
      HeatTransferCoefficientType = ExtNaturalConvection
      ExtNaturalConvectionType = HorizontalPlateUp
      Ldia = 0.0165
    fluid1: FluidHeatTransferModel "流体 1" on domains 1 | u_src = fromCommonDef; fluidType = gasLiquid

Mesh
  mesh1 "网格 1" (physics-controlled)

Studies
  std1 "研究 1"
    time: Transient "瞬态" | tunit = min; tlist = range(0,5,60)

Solver configurations
  sol1 "解 1" (study std1)
    v1: Variables "因变量 1"
    t1: Time "瞬态求解器 1"
      tlist = range(0,5,60)
      atolmethod = {comp1_T, global}
      atolvaluemethod = {comp1_T, factor}
      atol = {comp1_T, 1e-3}
      maxorder = 2
      estrat = exclude
      fc1: FullyCoupled "全耦合 1"
        linsolver = d1
        damp = 0.9
        jtech = once
        stabacc = aacc
        aaccdim = 5
        aaccmix = 0.9
        aaccdelay = 1
      d1: Direct "直接，温度 (ht)" | linsolver = pardiso; pivotperturb = 1.0E-13

Datasets
  dset1: Solution | solution = sol1
  rev1: Revolve2D "二维旋转" | data = dset1; startangle = -90; revangle = 225

Plots
  pg1: PlotGroup3D "三维温度 (ht)" | data = rev1
    surf1: Surface "表面" | expr = T
  pg2: PlotGroup2D "等温线 (ht)" | data = dset1; dataisaxisym = on
    con1: Contour "等值线" | expr = T; levelrounding = off